*Heading
** Job name: Ring Model name: Model-1
** Generated by: Abaqus/CAE Learning Edition 2022
*Preprint, echo=NO, model=NO, history=NO, contact=NO
**
** PARTS
**
*Part, name=Ring
*End Part
**
**
** ASSEMBLY
**
*Assembly, name=Assembly
**
*Instance, name=Ring-1, part=Ring
*Node
      1, 0.0594642758, 0.00800000038
      2, 0.0289136637, 0.00800000038
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*Element, type=CPE3
1, 357, 283, 290
2, 359, 285, 280
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*Element, type=CPE4R
  4,  52,  53, 172, 173
  5, 199, 258, 263, 201
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*Nset, nset=_PickedSet3, internal, generate
   1,  664,    1
*Elset, elset=_PickedSet3, internal, generate
   1,  615,    1
** Section: Section-1
*Solid Section, elset=_PickedSet3, material=Polymer
0.01,
*End Instance
**
*Nset, nset=_PickedSet5, internal, instance=Ring-1
 9,
*Nset, nset=_PickedSet6, internal, instance=Ring-1
  5,  6, 54, 55, 56, 57
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*Elset, elset=_PickedSet6, internal, instance=Ring-1
   8,  10,  22,  34,  45,  49
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*Nset, nset=_PickedSet7, internal, instance=Ring-1
 5,
*Nset, nset=_PickedSet8, internal, instance=Ring-1
 5,
*End Assembly
**
** MATERIALS
**
*Material, name=Polymer
*Elastic
 2.289e+09, 0.3
** ----------------------------------------------------------------
**
** STEP: Step-1
**
*Step, name=Step-1, nlgeom=NO
*Static
1., 1., 1e-05, 1.
**
** BOUNDARY CONDITIONS
**
** Name: BC-1 Type: Symmetry/Antisymmetry/Encastre
*Boundary
_PickedSet6, YSYMM
**
** LOADS
**
** Name: Load-1   Type: Concentrated force
*Cload
_PickedSet5, 2, 209.45
**
** OUTPUT REQUESTS
**
*Restart, write, frequency=0
**
** FIELD OUTPUT: F-Output-1
**
*Output, field, variable=PRESELECT
**
** HISTORY OUTPUT: H-Output-2
**
*Output, history
**
** HISTORY OUTPUT: H-Output-1
**
*Output, history, variable=PRESELECT
**
** HISTORY OUTPUT: H-Output-2
**
*Contour Integral, crack name=H-Output-2_Crack-1, contours=20, crack tip nodes, type=K FACTORS, symm
_PickedSet7, _PickedSet8, 1., 0., 0.
*End Step
